// SBML level 3 version 1
// Created with https://github.com/matthiaskoenig/sbmlutils.

model absorption_first_order()
  // Absorption model with first order kinetics

  // Compartments:
  compartment body = 1; body is "Body";  // SBO:0000247

  // Species:
  substanceOnly species A_tablet in body = Dose_A; A_tablet is "A (tablet)";  // SBO:0000247
  substanceOnly species A_central in body = 0; A_central is "A (body)";  // SBO:0000247
  substanceOnly species A_urine in body = 0; A_urine is "A (urine)";  // SBO:0000247

  // Parameters:
  Dose_A = 10; Dose_A is "Dose of A";
  ka = 1; ka is "Absorption rate";
  ke = 1; ke is "Elimination rate";

  // Reactions:
  ABSORPTION: A_tablet => A_central; ka*A_tablet; ABSORPTION is "absorption A";
  ELIMINATION: A_central => A_urine; ke*A_central; ELIMINATION is "elimination A";
end
