// SBML level 3 version 1
// Created with https://github.com/matthiaskoenig/sbmlutils.

model caffeine_kidney(Vext, Vki, Vurine, caf, px, caf_urine, px_urine)
  // Caffeine kidney model
  // CAF and PX can be excreted in the urine via the kidneys. The renal filtration and excretion processes are not modeled in detail, but first order irreversible mass-action kinetics are used.
  // Terms of use
  // The content of this model has been carefully created in a manual research effort. This file has been created by Matthias König using sbmlutils . For questions contact koenigmx@hu-berlin.de.
  // Copyright © 2022 Matthias König.
  // This work is licensed under a Creative Commons Attribution 4.0 International License.
  // Redistribution and use of any part of this model, with or without modification, are permitted provided that the following conditions are met:
  // Redistributions of this SBML file must retain the above copyright notice, this list of conditions and the following disclaimer.
  // Redistributions in a different form must reproduce the above copyright notice, this list of conditions and the following disclaimer in the documentation and/or other materials provided with the distribution.
  // This model is distributed in the hope that it will be useful, but WITHOUT ANY WARRANTY; without even the implied warranty of MERCHANTABILITY or FITNESS FOR A PARTICULAR PURPOSE.
  // model units - substance: mmole, time: min, volume: litre, area: m2, length: metre, extent: mmole

  // Compartments:
  compartment Vext = 4 litre; Vext is "plasma";  // SBO:0000290 ncit:C13356 BTO:0000131
  compartment Vki = 1.5 litre; Vki is "kidney";  // SBO:0000290 FMA:7203 BTO:0000671 ncit:C12415
  compartment Vurine = 1 litre;  // SBO:0000290 FMA:12274 ncit:C13283 BTO:0001419

  // Species:
  species caf in Vki = 0; caf is "caffeine (kidney)";  // SBO:0000247 CHEBI:27732 ncit:C328 inchikey:RYYVLZVUVIJVGH-UHFFFAOYSA-N
  species px in Vki = 0; px is "paraxanthine (kidney)";  // SBO:0000247 CHEBI:25858 inchikey:QUNWUDVFRNGTCO-UHFFFAOYSA-N pubchem.compound:4687
  substanceOnly species caf_urine in Vurine = 0; caf_urine is "caffeine (urine)";  // SBO:0000247 CHEBI:27732 ncit:C328 inchikey:RYYVLZVUVIJVGH-UHFFFAOYSA-N
  substanceOnly species px_urine in Vurine = 0; px_urine is "paraxanthine (urine)";  // SBO:0000247 CHEBI:25858 inchikey:QUNWUDVFRNGTCO-UHFFFAOYSA-N pubchem.compound:4687

  // Parameters:
  EX_k = 1 per_min; EX_k is "urinary excretion (kidney)";  // SBO:0000002
  CAFEX_f = 0 dimensionless; CAFEX_f is "fractional urinary contribution CAF";  // SBO:0000002
  PXEX_f = 5 dimensionless; PXEX_f is "fractional urinary contribution PX";  // SBO:0000002

  // Reactions:
  CAFEX: caf => caf_urine; EX_k*CAFEX_f*Vki*caf; CAFEX is "caffeine renal excretion";  // SBO:0000655
  PXEX: px => px_urine; EX_k*PXEX_f*Vki*px; PXEX is "paraxanthine renal excretion";  // SBO:0000655

  // Unit definitions:
  unit g_per_mole = gram / mole; g_per_mole is "g/mole";
  unit litre_per_min = litre / (60 second); litre_per_min is "litre/min";
  unit m2 = metre^2; m2 is "meter^2";
  unit mM = 1e-3 mole / litre; mM is "mmole/liter";
  unit mg = 1e-3 gram;
  unit min = 60 second;
  unit mmole = 1e-3 mole;
  unit mmole_per_min = 1e-3 mole / (60 second); mmole_per_min is "mmole/min";
  unit mmole_per_min_l = 1e-3 mole / (60 second * litre); mmole_per_min_l is "mmole/min/liter";
  unit per_min = 1 / (60 second); per_min is "1/min";
end
