// SBML level 3 version 1
// Created with https://github.com/matthiaskoenig/sbmlutils.

model caffeine_liver(Vext, Vli, caf, px)
  // Caffeine liver model
  // Caffeine is converted to paraxanthine, theobromine and theophyline. Only the conversion to paraxanthine is considered in the model.
  // Terms of use
  // The content of this model has been carefully created in a manual research effort. This file has been created by Matthias König using sbmlutils . For questions contact koenigmx@hu-berlin.de.
  // Copyright © 2022 Matthias König.
  // This work is licensed under a Creative Commons Attribution 4.0 International License.
  // Redistribution and use of any part of this model, with or without modification, are permitted provided that the following conditions are met:
  // Redistributions of this SBML file must retain the above copyright notice, this list of conditions and the following disclaimer.
  // Redistributions in a different form must reproduce the above copyright notice, this list of conditions and the following disclaimer in the documentation and/or other materials provided with the distribution.
  // This model is distributed in the hope that it will be useful, but WITHOUT ANY WARRANTY; without even the implied warranty of MERCHANTABILITY or FITNESS FOR A PARTICULAR PURPOSE.
  // model units - substance: mmole, time: min, volume: litre, area: m2, length: metre, extent: mmole

  // Compartments:
  compartment Vext = 4 litre; Vext is "plasma";  // SBO:0000290 ncit:C13356 BTO:0000131
  compartment Vli = 1.5 litre; Vli is "liver";  // SBO:0000290 FMA:7197 BTO:0000759 ncit:C12392

  // Species:
  species caf in Vli = 0; caf is "caffeine (liver)";  // SBO:0000247 CHEBI:27732 ncit:C328 inchikey:RYYVLZVUVIJVGH-UHFFFAOYSA-N
  species px in Vli = 0; px is "paraxanthine (liver)";  // SBO:0000247 CHEBI:25858 inchikey:QUNWUDVFRNGTCO-UHFFFAOYSA-N pubchem.compound:4687

  // Parameters:
  CAF2PX_Vmax = 0.0013 mmole_per_min_l; CAF2PX_Vmax is "Vmax caffeine to paraxanthine CYP1A2";  // SBO:0000186
  cyp1a2 = 1 dimensionless; cyp1a2 is "CYP1A2 factor";  // SBO:0000002
  CAF2PX_Km_caf = 0.015 mM; CAF2PX_Km_caf is "Km caffeine CYP1A2";  // SBO:0000027

  // Reactions:
  CAF2PX: caf => px; CAF2PX_Vmax*cyp1a2*Vli*caf/(CAF2PX_Km_caf + caf); CAF2PX is "caffeine to paraxanthine (CYP1A2)";  // SBO:0000176

  // Unit definitions:
  unit g_per_mole = gram / mole; g_per_mole is "g/mole";
  unit litre_per_min = litre / (60 second); litre_per_min is "litre/min";
  unit m2 = metre^2; m2 is "meter^2";
  unit mM = 1e-3 mole / litre; mM is "mmole/liter";
  unit mg = 1e-3 gram;
  unit min = 60 second;
  unit mmole = 1e-3 mole;
  unit mmole_per_min = 1e-3 mole / (60 second); mmole_per_min is "mmole/min";
  unit mmole_per_min_l = 1e-3 mole / (60 second * litre); mmole_per_min_l is "mmole/min/liter";
  unit per_min = 1 / (60 second); per_min is "1/min";
end
